// COMSOL Multiphysics 6.3.0.290 model "HW1.mph"
// Outline of the model tree

Geometry
  geom1 "Geometry 1" (3D, length unit m)
    cyl1: Cylinder | r = 0.5
    cyl2: Cylinder
    dif1: Difference | input = cyl2; input2 = cyl1
    fin: Finalize "Form Union"

Materials
  mat1: Common "Copper" on boundaries 1, 2, 5-10
    def: def "Basic"
      relpermeability = 1
      electricconductivity = 5.998e7[S/m]
      heatcapacity = 385[J/(kg*K)]
      relpermittivity = 1
      emissivity = 0.5
      density = 8940[kg/m^3]
      thermalconductivity = 400[W/(m*K)]
    Enu: Enu "Young's modulus and Poisson's ratio"
      E = 126e9[Pa]
      nu = 0.34
    linzRes: linzRes "Linearized resistivity"
      rho0 = 1.667e-8[ohm*m]
      alpha = 3.862e-3[1/K]
      Tref = 293.15[K]
  mat2: Common "Graphite" on boundaries 3, 4
    def: def "Basic"
      relpermeability = 1
      electricconductivity = 3e3[S/m]
      heatcapacity = 710[J/(kg*K)]
      relpermittivity = 1
      emissivity = 1
      density = 1950[kg/m^3]
      thermalconductivity = 150[W/(m*K)]*(300[K]/T)

Physics
  es: Electrostatics on all domains
    dependent variable V2
    fsp1: FreeSpace (default)
    zc1: ZeroCharge (default)
    init1: init "Initial Values 1" (default)
    gnd1: Ground on boundaries 5, 6, 8, 9
    term1: Terminal on boundaries 1, 2, 7, 10
      TerminalName = 1
      TerminalType = Voltage
      V0 = 10[V]
      Q0 = 0[C]
      P0 = 1
      CharacteristicImpedanceFrom = fromPhysics
      Zref = 50[ohm]
      Vinit = 0[V]
      Qinit = 0[C]
      ChargeScalingType = automatic
      Q0scal = 1[C]
      I_cir = 0[A]
      circuitConnectionStatus = notUsingCircuit
      constraintOptions = pointwiseConstraints
      constraintType = symmetricConstraint
      constraintMethod = elemental
    ccn1: ChargeConservation on all domains | epsilonr = 6.8

Mesh
  mesh1 "Mesh 1" (physics-controlled)

Studies
  std1 "Study 1"
    stat: Stationary

Solver configurations
  sol1 "Solution 1" (study std1)
    v1: Variables "Dependent Variables 1"
    s1: Stationary "Stationary Solver 1"
      fc1: FullyCoupled
      i1: Iterative
        mg1: Multigrid

Datasets
  dset1: Solution | solution = sol1
  grid1: Grid3D
    source = data
    data = dset1
    parmin1 = -3
    parmax1 = 3
    parmin2 = -3
    parmax2 = 3
    parmin3 = -1
    parmax3 = 2

Derived values
  gev1: EvalGlobal "Global Evaluation 1"
    data = dset1
    table = tbl1
    expr = es.C11
    unit = nF
    descr = Maxwell capacitance

Tables
  tbl1: Table
    // Global Evaluation 1
    Maxwell capacitance (nF)
    0.545785

Plots
  pg1: PlotGroup3D "Electric Potential (es)" | data = dset1
    mslc1: Multislice
      expr = V2
      multiplanexmethod = coord
      xcoord = es.CPx
      multiplaneymethod = coord
      ycoord = es.CPy
      multiplanezmethod = coord
      zcoord = es.CPz
    strmsl1: StreamlineMultislice
      expr = {es.Ex, es.Ey, es.Ez}
      multiplanexmethod = coord
      xcoord = es.CPx
      multiplaneymethod = coord
      ycoord = es.CPy
      multiplanezmethod = coord
      zcoord = es.CPz
      udist = 0.02
      maxsteps = 5000
      col1: Color "Color Expression 1" | expr = V2
      filt1: Filter | expr = !isScalingSystemDomain
    arwv1: ArrowVolume | expr = {es.Ex, es.Ey, es.Ez}